# OpenSim document version 40500
MarkerSet:
  Marker C7: torso (-0.06716062 0.3896334 0.001895274)
  Marker r_shoulder: torso (0 0.418 0.142) fixed=true
  Marker l_shoulder: torso (0 0.418 -0.142) fixed=true
  Marker sternum: torso (0.04020512 0.3557946 -0.00142203)
  Marker r_ASIS: pelvis (0.00275215 -0.004173479 0.1238971)
  Marker l_ASIS: pelvis (0.00275215 -0.00417348 -0.128)
  Marker r_PSIS: pelvis (-0.136966 0.0175665 0.0420924)
  Marker l_PSIS: pelvis (-0.1369664 0.01756654 -0.04209244)
  Marker r_knee: femur_r (0.008 -0.385269 0.05325)
  Marker r_mknee: femur_r (0.011 -0.386663 -0.0594363)
  Marker r_ankle: tibia_r (-0.01475424 -0.3872676 0.0322781)
  Marker r_mankle: tibia_r (0.002889887 -0.389308 -0.02240569)
  Marker r_toe: calcn_r (0.180459 0.015 0.00990812)
  Marker r_5meta: calcn_r (0.1358638 -0.0003003108 0.05386575)
  Marker r_calc: calcn_r (-0.00014179 0.023 -0.01)
  Marker l_knee: femur_l (0.008 -0.385269 -0.05325)
  Marker l_mknee: femur_l (0.011 -0.386663 0.0569778)
  Marker l_ankle: tibia_l (-0.0147542 -0.387268 -0.0322781)
  Marker l_mankle: tibia_l (0.00288989 -0.389308 0.0224057)
  Marker l_toe: calcn_l (0.180459 0.015 -0.00990812)
  Marker l_calc: calcn_l (-0.00014179 0.023 0.01)
  Marker l_5meta: calcn_l (0.135864 0.00111483 -0.0538657)
  Marker r_melbow: humerus_r (0.002154953 -0.2785841 -0.02938132) fixed=true
  Marker r_elbow: humerus_r (0.009215017 -0.2759834 0.0261577) fixed=true
  Marker r_wrist_radius: radius_r (-0.02124921 -0.2260851 0.03454095) fixed=true
  Marker r_wrist_ulna: radius_r (-0.02037085 -0.2267499 -0.006544424) fixed=true
  Marker l_melbow: humerus_l (0.00215495 -0.278584 0.0293813) fixed=true
  Marker l_elbow: humerus_l (0.00921502 -0.275983 -0.0261577) fixed=true
  Marker l_wrist_radius: radius_l (-0.0212492 -0.226085 -0.0345409) fixed=true
  Marker l_wrist_ulna: radius_l (-0.0203708 -0.22675 0.00654442) fixed=true
  Marker Neck: torso (-0.01748659 0.3747447 0.09277385) fixed=true
  Marker RShoulder: torso (0.01035874 0.3737766 0.1465074)
  Marker LShoulder: torso (0.0103587 0.373777 -0.146507)
  Marker RHip: pelvis (-0.056276 -0.06349 0.07726) fixed=true
  Marker LHip: pelvis (-0.056276 -0.06349 -0.07726) fixed=true
  Marker midHip: pelvis (-0.020276 -0.07849 0) fixed=true
  Marker RKnee: tibia_r (-0.00808954 -0.0035348 -0.00148474) fixed=true
  Marker LKnee: tibia_l (-0.00808954 -0.0035348 0.00148474) fixed=true
  Marker RAnkle: tibia_r (-0.014 -0.38 0.0075) fixed=true
  Marker LAnkle: tibia_l (-0.014 -0.38 -0.0075) fixed=true
  Marker RHeel: calcn_r (0.01820599 0.01 -0.02024674) fixed=true
  Marker LHeel: calcn_l (0.01820599 0.01 0.02024674) fixed=true
  Marker RSmallToe: calcn_r (0.200266 3.68629e-17 0.0404935) fixed=true
  Marker LSmallToe: calcn_l (0.200266 3.68629e-17 -0.0404935) fixed=true
  Marker RBigToe: calcn_r (0.227575 3.59955e-17 -0.0151851) fixed=true
  Marker LBigToe: calcn_l (0.227575 3.59955e-17 0.0151851) fixed=true
  Marker RElbow: humerus_r (0.013144 -0.286273 -0.009595) fixed=true
  Marker LElbow: humerus_l (0.013144 -0.286273 0.009595) fixed=true
  Marker RWrist: hand_r (0 0 0) fixed=true
  Marker LWrist: hand_l (0 0 0) fixed=true
  Marker T6: torso (-0.07933311 0.2969753 0.001441265)
